# OpenSim document version 40000
InverseKinematicsTool 20thDec:
  results_directory: C:\Users\r03mm22\Documents\OpenSenseTesting\23_12_20\OMC_withThoraxCon_andAdjuMark\20thDecIK_Results
  model_file: das3_scaled_and_placed.osim
  constraint_weight: 20
  accuracy: 1e-5
  time_range: 18 40
  output_motion_file: C:\Users\r03mm22\Documents\OpenSenseTesting\23_12_20\OMC_withThoraxCon_andAdjuMark\20thDecIK_Results\OMC_IK_results.mot
  report_errors: true
  marker_file: BL_marker_pos.trc
  report_marker_locations: false
  IKTaskSet MoBL_ARMS_IK:
    IKMarkerTask IJ: apply=true weight=1
    IKMarkerTask T8: apply=true weight=1
    IKMarkerTask PX: apply=true weight=1
    IKMarkerTask C7: apply=true weight=1
    IKMarkerTask GH: apply=true weight=1
    IKMarkerTask EL: apply=true weight=1
    IKMarkerTask RS: apply=true weight=1
    IKMarkerTask EM: apply=true weight=1
    IKMarkerTask US: apply=true weight=1
