# OpenSim document version 40000
AnalyzeTool analyze:
  model_file: C:\Users\r03mm22\Documents\Protocol_Testing\OMC_Repo\das3.osim
  replace_force_set: false
  results_directory: C:\Users\r03mm22\Documents\Protocol_Testing\2024 Data Collection\P3
  output_precision: 8
  initial_time: 0
  final_time: 96
  solve_for_equilibrium_for_auxiliary_states: false
  maximum_number_of_integrator_steps: 20000
  maximum_integrator_step_size: 1
  minimum_integrator_step_size: 1e-8
  integrator_error_tolerance: 1e-5
  coordinates_file: IMU_IK_results.mot
  lowpass_cutoff_frequency_for_coordinates: -1
  AnalysisSet Analyses:
    BodyKinematics: start_time=-Inf end_time=Inf step_interval=1 in_degrees=true bodies=all
        express_results_in_body_local_frame=false
